*Heading
 Stopped displacement BCs and used force instead.
** Job name: testPinch2 Model name: axiSymSphere
** Generated by: Abaqus/CAE 2017
*Preprint, echo=NO, model=NO, history=NO, contact=NO
**
** PARTS
**
*Part, name=plane
*End Part
**
*Part, name=sphere
*Node
      1,   10.1563797,    11.038476
      2,           0.,           0.
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*Element, type=CAX4R
  1,   8,   9, 127, 115
  2,   9,  10, 128, 127
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*Nset, nset=fullSphere, generate
   1,  489,    1
*Elset, elset=fullSphere, generate
   1,  450,    1
** Section: Section-1
*Solid Section, elset=fullSphere, controls=EC-1, material=Material-1
,
*End Part
**
**
** ASSEMBLY
**
*Assembly, name=Assembly
**
*Instance, name=fullSphere_a, part=sphere
*End Instance
**
*Instance, name=plane_a1, part=plane
          0.,         -22.,           0.
*Node
      1,   6.44659042,           7.,           0.
*Nset, nset=plane_a1-RefPt_, internal
1,
*Surface, type=SEGMENTS, name=m_Surf-3
START,           0.,           7.
 LINE, 12.893180847168,           7.
*Rigid Body, ref node=plane_a1-RefPt_, analytical surface=m_Surf-3
*End Instance
**
*Instance, name=plane_a2, part=plane
          0.,           8.,           0.
*Node
      1,   6.44659042,           7.,           0.
*Nset, nset=plane_a2-RefPt_, internal
1,
*Surface, type=SEGMENTS, name=m_Surf-1
START, 12.893180847168,           7.
 LINE,           0.,           7.
*Rigid Body, ref node=plane_a2-RefPt_, analytical surface=m_Surf-1
*End Instance
**
*Nset, nset=CalibrationNodes, instance=fullSphere_a
  8, 17, 48, 59, 98
*Nset, nset=axis, instance=fullSphere_a
  2,  5,  6, 65, 66, 67
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*Elset, elset=axis, instance=fullSphere_a
 251, 256, 261, 266, 271, 276
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*Nset, nset=bottomBar, instance=plane_a1
 1,
*Nset, nset=bottomEdge, instance=fullSphere_a
  3,  5, 55, 56, 57, 58, 59, 60, 61, 62, 63, 64
*Elset, elset=bottomEdge, instance=fullSphere_a
 193, 194, 195, 196, 197, 198, 285, 294, 303, 312, 321
*Nset, nset=bottomRP, instance=plane_a1
 1,
*Nset, nset=centralNode, instance=fullSphere_a
 2,
*Nset, nset=topBar, instance=plane_a2
 1,
*Nset, nset=topEdge, instance=fullSphere_a
   1,   6,  93,  94,  95,  96,  97,  98,  99, 100, 101, 102
*Elset, elset=topEdge, instance=fullSphere_a
 360, 369, 378, 387, 396, 405, 406, 407, 408, 409, 410
*Nset, nset=topRP, instance=plane_a2
 1,
*Elset, elset=_s_Surf-1_S2, internal, instance=fullSphere_a, generate
 360,  405,    9
*Elset, elset=_s_Surf-1_S1, internal, instance=fullSphere_a, generate
 406,  410,    1
*Surface, type=ELEMENT, name=s_Surf-1
_s_Surf-1_S2, S2
_s_Surf-1_S1, S1
*Elset, elset=_s_Surf-3_S1, internal, instance=fullSphere_a, generate
 193,  198,    1
*Elset, elset=_s_Surf-3_S2, internal, instance=fullSphere_a, generate
 285,  321,    9
*Surface, type=ELEMENT, name=s_Surf-3
_s_Surf-3_S1, S1
_s_Surf-3_S2, S2
*End Assembly
**
** ELEMENT CONTROLS
**
*Section Controls, name=EC-1, hourglass=ENHANCED
1., 1., 1.
**
** MATERIALS
**
*Material, name=Material-1
*Elastic
200., 0.3
**
** INTERACTION PROPERTIES
**
*Surface Interaction, name=IntProp-1
1.,
*Friction, slip tolerance=0.005
 0.8,
*Surface Behavior, no separation, penalty
, , 100.
**
** INTERACTIONS
**
** Interaction: bottomContact
*Contact Pair, interaction=IntProp-1, type=SURFACE TO SURFACE
s_Surf-3, plane_a1.m_Surf-3
** Interaction: topContact
*Contact Pair, interaction=IntProp-1, type=SURFACE TO SURFACE
s_Surf-1, plane_a2.m_Surf-1
** ----------------------------------------------------------------
**
** STEP: Step-1
**
*Step, name=Step-1, nlgeom=YES
*Static
0.5, 1., 1e-05, 1.
**
** BOUNDARY CONDITIONS
**
** Name: bottomDispl Type: Displacement/Rotation
*Boundary
bottomRP, 1, 1
bottomRP, 2, 2, 0.02
bottomRP, 6, 6
** Name: encastre Type: Symmetry/Antisymmetry/Encastre
*Boundary
centralNode, ENCASTRE
** Name: symmetry Type: Symmetry/Antisymmetry/Encastre
*Boundary
axis, XSYMM
** Name: topDispl Type: Displacement/Rotation
*Boundary
topRP, 1, 1
topRP, 2, 2, -0.02
topRP, 6, 6
**
** OUTPUT REQUESTS
**
*Restart, write, frequency=0
**
** FIELD OUTPUT: F-Output-2
**
*Output, field
*Node Output, nset=CalibrationNodes
CF, RF, U, UR, UT
*Contact Output, nset=CalibrationNodes
CFORCE, CNAREA, CSTATUS, CSTRESS
**
** FIELD OUTPUT: F-Output-1
**
*Output, field, variable=PRESELECT
**
** HISTORY OUTPUT: H-Output-1
**
*Output, history, variable=PRESELECT
*End Step
** ----------------------------------------------------------------
**
** STEP: Step-2
**
*Step, name=Step-2, nlgeom=YES, inc=10000
*Static
0.01, 1., 1e-05, 1.
**
** BOUNDARY CONDITIONS
**
** Name: bottomDispl Type: Displacement/Rotation
*Boundary, op=NEW
** Name: bottomDispl-Copy Type: Displacement/Rotation
*Boundary, op=NEW
bottomRP, 1, 1
bottomRP, 2, 2
bottomRP, 6, 6
** Name: encastre Type: Symmetry/Antisymmetry/Encastre
*Boundary, op=NEW
** Name: symmetry Type: Symmetry/Antisymmetry/Encastre
*Boundary, op=NEW
axis, XSYMM
** Name: topDispl Type: Displacement/Rotation
*Boundary, op=NEW
** Name: topDispl-Copy Type: Displacement/Rotation
*Boundary, op=NEW
topRP, 1, 1
topRP, 6, 6
**
** LOADS
**
** Name: Load-1   Type: Concentrated force
*Cload
topBar, 2, -600.
**
** OUTPUT REQUESTS
**
*Restart, write, frequency=0
**
** FIELD OUTPUT: F-Output-2, F-Output-3
**
*Output, field
*Node Output, nset=CalibrationNodes
CF, RF, U, UR, UT
*Contact Output, nset=CalibrationNodes
CFORCE, CNAREA, CSTATUS, CSTRESS
**
** FIELD OUTPUT: F-Output-1
**
*Output, field, variable=PRESELECT
**
** HISTORY OUTPUT: H-Output-1
**
*Output, history, variable=PRESELECT
*End Step
